<Lems>

    <DefaultRun component="sim1" reportFile="/home/mathijs/nC_projects/Project_1/simulations/Sim_3/simulator.props" timesFile="/home/mathijs/nC_projects/Project_1/simulations/Sim_3/time.dat"/>

        <!--Include standard NeuroML 2 ComponentClass definitions-->

    <Include file="NeuroML2CoreTypes/Cells.xml"/>
    <Include file="NeuroML2CoreTypes/Networks.xml"/>
    <Include file="NeuroML2CoreTypes/Simulation.xml"/>

    <Include file="NeuroML2CoreTypes/PyNN.xml"/>

        <!--Include the generated NeuroML 2 files-->
    <Include file="/home/mathijs/nC_projects/Project_1/generatedNeuroML/21A_scaled_exp.nml"/>
    <Include file="/home/mathijs/nC_projects/Project_1/generatedNeuroML/21B_scaled_exp.nml"/>
    <Include file="/home/mathijs/nC_projects/Project_1/generatedNeuroML/ElectSyn2.nml"/>
    <Include file="/home/mathijs/nC_projects/Project_1/generatedNeuroML/Project_1.nml"/>

    <Simulation id="sim1" length="100.0ms" step="0.025ms" target="network_Project_1">
        </Simulation>

</Lems>
