<?xml version="1.0" encoding="UTF-8"?>
<neuroml xmlns="http://www.neuroml.org/schema/neuroml2" xmlns:xsi="http://www.w3.org/2001/XMLSchema-instance" xsi:schemaLocation="http://www.neuroml.org/schema/neuroml2  https://raw.github.com/NeuroML/NeuroML2/development/Schemas/NeuroML2/NeuroML_v2beta3.xsd" id="net">
  <include href="C20A_scaled_exp.cell.nml"/>

  <!--<pulseGenerator id="iclamp0" delay="600 ms" duration="200 ms" amplitude="-1 uA"/>-->
  <pulseGenerator id="iclamp0" delay="500 ms" duration="200 ms" amplitude="-1 nA"/>

  <network id="net" type="networkWithTemperature" temperature="35 degC">

    <population id="pop" component="C20A" type="populationList" size="1">
      <instance id="0">
        <location x="0" y="0" z="0"/>
      </instance>
    </population>

    <inputList id="Clamps" component="iclamp0" population="pop">
        <input id="0" target="../pop/0/C20A" segmentId="0" destination="synapses"/> <!-- iclamp into iseg -->
    </inputList>

  </network>

  <network id="net1" type="networkWithTemperature" temperature="35 degC">

    <population id="pop1" component="C20A" type="populationList" size="1">
      <instance id="0">
        <location x="100" y="100" z="100"/>
      </instance>
    </population>

    <inputList id="Clamps" component="iclamp0" population="pop">
        <input id="0" target="../pop1/0/C20A" segmentId="0" destination="synapses"/> <!-- iclamp into iseg -->
    </inputList>

  </network>

</neuroml>
