<?xml version="1.0" encoding="UTF-8"?>
<neuroml xmlns="http://www.neuroml.org/schema/neuroml2" xmlns:xsi="http://www.w3.org/2001/XMLSchema-instance" xsi:schemaLocation="http://www.neuroml.org/schema/neuroml2  https://raw.githubusercontent.com/NeuroML/NeuroML2/development/Schemas/NeuroML2/NeuroML_v2beta5.xsd" id="C51D_scaled_exp">
<!-- soma -->
    <include href="na_s.channel.nml"/>
    <include href="kdr.channel.nml"/>
    <include href="k.channel.nml"/>
    <include href="cal.channel.nml"/>

    <!-- dend -->
    <include href="cah.channel.nml"/>
    <include href="kca.channel.nml"/>
    <include href="h.channel.nml"/>
    <include href="ca.nml"/>

    <!-- axon -->
    <include href="na_a.channel.nml"/>

    <!-- all  -->
    <include href="leak.channel.nml"/>

    <!--
    % Cell morphology
    % p1     = 0.25;        % Cell surface ratio soma/dendrite
    % p2     = 0.15;        % Cell surface ratio axon(hillock)/soma
    % g_int  = 0.13;        % Cell internal conductance

    Adend = ldend*pi*Rdendˆ2
    Asoma = lsoma*pi*Rsomaˆ2

    .25 = ldend*RDendˆ2 / lsoma*pi*Rsomaˆ2

    assume Rdend = 10;
    assume Rsoma = 20;
    assume lsoma = 20;
    assume ldend = 200
    4*1*ldend = lsoma*Rsomaˆ2
    4*1*ldend = 10*400

    assume lsoma = 20;
    ldend = 2250;

    Raxon = 20;
    .15 = laxon*20ˆ2 / 20*20ˆ2

    20 * .15 = laxon = 3;
    -->
    <cell id="C51D_resample10">

        <notes>Cell morphology generated by neuroConstruct from file: C51D_scaled_exp.swc
TREES toolbox tree - C51D_scaled_exp
written by an automatic procedure "swc_tree" part of the TREES package
in MATLAB
copyright 2009 Hermann Cuntz
inode R X Y Z D/2 idpar</notes>

        <morphology id="morphology_C51D_scaled_exp">

            <segment id="0" name="Comp_1">
                <proximal x="224.1069" y="99.85678" z="29.4459" diameter="15.96"/>
                <distal x="228.86305" y="94.57883" z="31.601797" diameter="4.41712"/>
            </segment>

            <segment id="1" name="Comp_3">
                <parent segment="0"/>
                <distal x="221.07182" y="94.09286" z="33.83517" diameter="5.605"/>
            </segment>

            <segment id="2" name="Comp_4">
                <parent segment="0" fractionAlong="0.0"/>
                <proximal x="224.1069" y="99.85678" z="29.4459" diameter="15.96"/>
                <distal x="226.03029" y="102.94584" z="21.38431" diameter="8.265"/>
            </segment>

            <segment id="3" name="Comp_5">
                <parent segment="0" fractionAlong="0.0"/>
                <proximal x="224.1069" y="99.85678" z="29.4459" diameter="6.84"/>
                <distal x="220.40247" y="106.39039" z="33.25847" diameter="6.84"/>
            </segment>

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
            <segmentGroup id="Soma" neuroLexId="sao864921383">    <!--
                This group contains an unbranched set of segments, and all of the segmentGroups marked with
                neuroLexId = sao864921383 form a non-overlapping set of all of the segments.
                These segmentGroups correspond to the 'cables' of NeuroML v1.8.1. -->

                <member segment="0"/>

                <member segment="1"/>
            </segmentGroup>

            <segmentGroup id="ExtraSomaSec_Comp_4" neuroLexId="sao864921383">    <!--
                This group contains an unbranched set of segments, and all of the segmentGroups marked with
                neuroLexId = sao864921383 form a non-overlapping set of all of the segments.
                These segmentGroups correspond to the 'cables' of NeuroML v1.8.1. -->

                <member segment="2"/>
            </segmentGroup>

            <segmentGroup id="Sec_Comp_5" neuroLexId="sao864921383">    <!--
                This group contains an unbranched set of segments, and all of the segmentGroups marked with
                neuroLexId = sao864921383 form a non-overlapping set of all of the segments.
                These segmentGroups correspond to the 'cables' of NeuroML v1.8.1. -->

                <member segment="3"/>
            </segmentGroup>

            <segmentGroup id="Sec_Comp_6" neuroLexId="sao864921383">    <!--
                This group contains an unbranched set of segments, and all of the segmentGroups marked with
                neuroLexId = sao864921383 form a non-overlapping set of all of the segments.
                These segmentGroups correspond to the 'cables' of NeuroML v1.8.1. -->

                <member segment="4"/>

                <member segment="11"/>

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            </segmentGroup>

            <segmentGroup id="Sec_Comp_7" neuroLexId="sao864921383">    <!--
                This group contains an unbranched set of segments, and all of the segmentGroups marked with
                neuroLexId = sao864921383 form a non-overlapping set of all of the segments.
                These segmentGroups correspond to the 'cables' of NeuroML v1.8.1. -->

                <member segment="5"/>

                <member segment="12"/>

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            </segmentGroup>

            <segmentGroup id="Sec_Comp_8" neuroLexId="sao864921383">    <!--
                This group contains an unbranched set of segments, and all of the segmentGroups marked with
                neuroLexId = sao864921383 form a non-overlapping set of all of the segments.
                These segmentGroups correspond to the 'cables' of NeuroML v1.8.1. -->

                <member segment="6"/>

                <member segment="15"/>

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            </segmentGroup>

            <segmentGroup id="Sec_Comp_9" neuroLexId="sao864921383">    <!--
                This group contains an unbranched set of segments, and all of the segmentGroups marked with
                neuroLexId = sao864921383 form a non-overlapping set of all of the segments.
                These segmentGroups correspond to the 'cables' of NeuroML v1.8.1. -->

                <member segment="7"/>
            </segmentGroup>

            <segmentGroup id="Sec_Comp_10" neuroLexId="sao864921383">    <!--
                This group contains an unbranched set of segments, and all of the segmentGroups marked with
                neuroLexId = sao864921383 form a non-overlapping set of all of the segments.
                These segmentGroups correspond to the 'cables' of NeuroML v1.8.1. -->

                <member segment="8"/>
            </segmentGroup>

            <segmentGroup id="Sec_Comp_11" neuroLexId="sao864921383">    <!--
                This group contains an unbranched set of segments, and all of the segmentGroups marked with
                neuroLexId = sao864921383 form a non-overlapping set of all of the segments.
                These segmentGroups correspond to the 'cables' of NeuroML v1.8.1. -->

                <member segment="9"/>
            </segmentGroup>

            <segmentGroup id="Sec_Comp_12" neuroLexId="sao864921383">    <!--
                This group contains an unbranched set of segments, and all of the segmentGroups marked with
                neuroLexId = sao864921383 form a non-overlapping set of all of the segments.
                These segmentGroups correspond to the 'cables' of NeuroML v1.8.1. -->

                <member segment="10"/>

                <member segment="20"/>
            </segmentGroup>

            <segmentGroup id="Sec_Comp_15" neuroLexId="sao864921383">    <!--
                This group contains an unbranched set of segments, and all of the segmentGroups marked with
                neuroLexId = sao864921383 form a non-overlapping set of all of the segments.
                These segmentGroups correspond to the 'cables' of NeuroML v1.8.1. -->

                <member segment="13"/>

                <member segment="24"/>

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            </segmentGroup>

            <segmentGroup id="Sec_Comp_16" neuroLexId="sao864921383">    <!--
                This group contains an unbranched set of segments, and all of the segmentGroups marked with
                neuroLexId = sao864921383 form a non-overlapping set of all of the segments.
                These segmentGroups correspond to the 'cables' of NeuroML v1.8.1. -->

                <member segment="14"/>

                <member segment="28"/>

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            </segmentGroup>

            <segmentGroup id="Sec_Comp_18" neuroLexId="sao864921383">    <!--
                This group contains an unbranched set of segments, and all of the segmentGroups marked with
                neuroLexId = sao864921383 form a non-overlapping set of all of the segments.
                These segmentGroups correspond to the 'cables' of NeuroML v1.8.1. -->

                <member segment="16"/>

                <member segment="23"/>

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            </segmentGroup>

            <segmentGroup id="Sec_Comp_19" neuroLexId="sao864921383">    <!--
                This group contains an unbranched set of segments, and all of the segmentGroups marked with
                neuroLexId = sao864921383 form a non-overlapping set of all of the segments.
                These segmentGroups correspond to the 'cables' of NeuroML v1.8.1. -->

                <member segment="17"/>

                <member segment="26"/>

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            </segmentGroup>

            <segmentGroup id="Sec_Comp_20" neuroLexId="sao864921383">    <!--
                This group contains an unbranched set of segments, and all of the segmentGroups marked with
                neuroLexId = sao864921383 form a non-overlapping set of all of the segments.
                These segmentGroups correspond to the 'cables' of NeuroML v1.8.1. -->

                <member segment="18"/>

                <member segment="27"/>
            </segmentGroup>

            <segmentGroup id="Sec_Comp_21" neuroLexId="sao864921383">    <!--
                This group contains an unbranched set of segments, and all of the segmentGroups marked with
                neuroLexId = sao864921383 form a non-overlapping set of all of the segments.
                These segmentGroups correspond to the 'cables' of NeuroML v1.8.1. -->

                <member segment="19"/>

                <member segment="25"/>

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            </segmentGroup>

            <segmentGroup id="Sec_Comp_36" neuroLexId="sao864921383">    <!--
                This group contains an unbranched set of segments, and all of the segmentGroups marked with
                neuroLexId = sao864921383 form a non-overlapping set of all of the segments.
                These segmentGroups correspond to the 'cables' of NeuroML v1.8.1. -->

                <member segment="34"/>

                <member segment="45"/>
            </segmentGroup>

            <segmentGroup id="Sec_Comp_37" neuroLexId="sao864921383">    <!--
                This group contains an unbranched set of segments, and all of the segmentGroups marked with
                neuroLexId = sao864921383 form a non-overlapping set of all of the segments.
                These segmentGroups correspond to the 'cables' of NeuroML v1.8.1. -->

                <member segment="35"/>

                <member segment="48"/>

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            </segmentGroup>

            <segmentGroup id="Sec_Comp_58" neuroLexId="sao864921383">    <!--
                This group contains an unbranched set of segments, and all of the segmentGroups marked with
                neuroLexId = sao864921383 form a non-overlapping set of all of the segments.
                These segmentGroups correspond to the 'cables' of NeuroML v1.8.1. -->

                <member segment="56"/>

                <member segment="65"/>

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            </segmentGroup>

            <segmentGroup id="Sec_Comp_60" neuroLexId="sao864921383">    <!--
                This group contains an unbranched set of segments, and all of the segmentGroups marked with
                neuroLexId = sao864921383 form a non-overlapping set of all of the segments.
                These segmentGroups correspond to the 'cables' of NeuroML v1.8.1. -->

                <member segment="58"/>

                <member segment="67"/>

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            </segmentGroup>

            <segmentGroup id="Sec_Comp_105" neuroLexId="sao864921383">    <!--
                This group contains an unbranched set of segments, and all of the segmentGroups marked with
                neuroLexId = sao864921383 form a non-overlapping set of all of the segments.
                These segmentGroups correspond to the 'cables' of NeuroML v1.8.1. -->

                <member segment="103"/>

                <member segment="110"/>

                <member segment="117"/>

                <member segment="119"/>
            </segmentGroup>

            <segmentGroup id="Sec_Comp_106" neuroLexId="sao864921383">    <!--
                This group contains an unbranched set of segments, and all of the segmentGroups marked with
                neuroLexId = sao864921383 form a non-overlapping set of all of the segments.
                These segmentGroups correspond to the 'cables' of NeuroML v1.8.1. -->

                <member segment="104"/>
            </segmentGroup>

            <segmentGroup id="all">
                <include segmentGroup="Soma"/>
                <include segmentGroup="ExtraSomaSec_Comp_4"/>
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            </segmentGroup>

            <segmentGroup id="Colour_White">
                <include segmentGroup="Soma"/>
                <include segmentGroup="ExtraSomaSec_Comp_4"/>
            </segmentGroup>

            <segmentGroup id="soma_group" neuroLexId="GO:0043025">    <!--Soma group-->

                <include segmentGroup="Soma"/>
            </segmentGroup>

            <segmentGroup id="dendrite_group" neuroLexId="GO:0030425">    <!--Dendrite group-->

                <include segmentGroup="ExtraSomaSec_Comp_4"/>
            </segmentGroup>

            <segmentGroup id="ExtraSomaSegments">
                <include segmentGroup="ExtraSomaSec_Comp_4"/>
            </segmentGroup>

            <segmentGroup id="axon_group" neuroLexId="GO:0030424">    <!--Axon group-->

                <include segmentGroup="Sec_Comp_5"/>
                <include segmentGroup="Sec_Comp_6"/>
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            </segmentGroup>

            <segmentGroup id="Colour_DarkGrey">
                <include segmentGroup="Sec_Comp_5"/>
                <include segmentGroup="Sec_Comp_6"/>
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            </segmentGroup>

        </morphology>

            <!--Adding the biophysical parameters-->
        <biophysicalProperties id="biophys">

            <membraneProperties>
                <!-- soma -->
                <channelDensity condDensity="30 mS_per_cm2" id="na_s_soma" segmentGroup="soma_group" ionChannel="na_s" ion="na" erev="55 mV"/>
                <channelDensity condDensity="30 mS_per_cm2" id="kdr_soma" segmentGroup="soma_group"
                ionChannel="kdr" ion="k" erev="-75 mV"/>
                <channelDensity condDensity="15 mS_per_cm2" id="k_soma" segmentGroup="soma_group"
                ionChannel="k" ion="k" erev="-75 mV"/>
                <channelDensity condDensity="20 mS_per_cm2" id="cal_soma" segmentGroup="soma_group"
                ionChannel="cal" ion="cal" erev="120 mV"/>

                <!-- dendrite 10 35 25-->
                <channelDensity condDensity="10 mS_per_cm2" id="cah_dend" segmentGroup="dendrite_group" ionChannel="cah" ion="ca" erev="120 mV"/>
                <channelDensity condDensity="35 mS_per_cm2" id="kca_dend" segmentGroup="dendrite_group" ionChannel="kca" ion="k" erev="-75 mV"/>
                <channelDensity condDensity="25 mS_per_cm2" id="h_dend" segmentGroup="dendrite_group" ionChannel="h" ion="k" erev="-43 mV"/>

                <!-- axon -->
                <channelDensity condDensity="200 mS_per_cm2" id="na_axon" segmentGroup="axon_group" ionChannel="na_a" ion="na" erev="55 mV"/>
                <channelDensity condDensity="200 mS_per_cm2" id="k_axon" segmentGroup="axon_group" ionChannel="k" ion="k" erev="-75 mV"/>

                <channelDensity condDensity="1.3e-2 mS_per_cm2" id="leak_all" segmentGroup="all" ionChannel="leak" ion="_leak" erev="10 mV"/>

                <spikeThresh value="0 mV"/>
                <specificCapacitance value="1 uF_per_cm2"/>
                <initMembPotential value="-65.0 mV"/>

            </membraneProperties>

            <intracellularProperties>
                <species segmentGroup="dendrite_group" id="ca" ion="ca" concentrationModel="ca_conc" initialConcentration="3.7152 mM" initialExtConcentration="3.0mM"/>

                <resistivity value=".1 ohm_cm" segmentGroup="soma_group"/>
                <resistivity value=".1 ohm_cm" segmentGroup="dendrite_group"/>
                <resistivity value=".1 ohm_cm" segmentGroup="axon_group"/>
            </intracellularProperties>

        </biophysicalProperties>

    </cell>

</neuroml>
