<?xml version="1.0" encoding="UTF-8"?>
<neuroml xmlns="http://www.neuroml.org/schema/neuroml2" xmlns:xsi="http://www.w3.org/2001/XMLSchema-instance" xsi:schemaLocation="http://www.neuroml.org/schema/neuroml2  https://raw.githubusercontent.com/NeuroML/NeuroML2/development/Schemas/NeuroML2/NeuroML_v2beta5.xsd" id="C28A_scaled_exp">

    <!-- soma -->
    <include href="na_s.channel.nml"/>
    <include href="kdr.channel.nml"/>
    <include href="k.channel.nml"/>
    <include href="cal.channel.nml"/>

    <!-- dend -->
    <include href="cah.channel.nml"/>
    <include href="kca.channel.nml"/>
    <include href="h.channel.nml"/>
    <include href="ca.nml"/>

    <!-- axon -->
    <include href="na_a.channel.nml"/>

    <!-- all  -->
    <include href="leak.channel.nml"/>

    <!--
    % Cell morphology
    % p1     = 0.25;        % Cell surface ratio soma/dendrite
    % p2     = 0.15;        % Cell surface ratio axon(hillock)/soma
    % g_int  = 0.13;        % Cell internal conductance

    Adend = ldend*pi*Rdendˆ2
    Asoma = lsoma*pi*Rsomaˆ2

    .25 = ldend*RDendˆ2 / lsoma*pi*Rsomaˆ2

    assume Rdend = 10;
    assume Rsoma = 20;
    assume lsoma = 20;
    assume ldend = 200
    4*1*ldend = lsoma*Rsomaˆ2
    4*1*ldend = 10*400

    assume lsoma = 20;
    ldend = 2250;

    Raxon = 20;
    .15 = laxon*20ˆ2 / 20*20ˆ2

    20 * .15 = laxon = 3;
    -->
    <cell id="C28A_resample20">

        <notes>Cell morphology generated by neuroConstruct from file: C28A_scaled_exp.swc
TREES toolbox tree - C28A_scaled_exp
written by an automatic procedure "swc_tree" part of the TREES package
in MATLAB
copyright 2009 Hermann Cuntz
inode R X Y Z D/2 idpar</notes>

        <morphology id="morphology_C28A_scaled_exp">

            <segment id="0" name="Comp_1">
                <proximal x="128.3942" y="116.7616" z="81.5085" diameter="18.0"/>
                <distal x="124.92097" y="118.588295" z="87.616806" diameter="12.2"/>
            </segment>

            <segment id="1" name="Comp_2">
                <parent segment="0" fractionAlong="0.0"/>
                <proximal x="128.3942" y="116.7616" z="81.5085" diameter="2.0248"/>
                <distal x="112.60831" y="114.57884" z="81.214714" diameter="2.0248"/>
            </segment>

            <segment id="2" name="Comp_3">
                <parent segment="0" fractionAlong="0.0"/>
                <proximal x="128.3942" y="116.7616" z="81.5085" diameter="1.9752"/>
                <distal x="132.08026" y="107.107445" z="89.74267" diameter="1.9752"/>
            </segment>

            <segment id="3" name="Comp_4">
                <parent segment="0" fractionAlong="0.0"/>
                <proximal x="128.3942" y="116.7616" z="81.5085" diameter="3.0248"/>
                <distal x="120.31634" y="107.22316" z="76.080086" diameter="3.0248"/>
            </segment>

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
            <segmentGroup id="Soma" neuroLexId="sao864921383">    <!--
                This group contains an unbranched set of segments, and all of the segmentGroups marked with
                neuroLexId = sao864921383 form a non-overlapping set of all of the segments.
                These segmentGroups correspond to the 'cables' of NeuroML v1.8.1. -->

                <member segment="0"/>
            </segmentGroup>

            <segmentGroup id="Sec_Comp_2" neuroLexId="sao864921383">    <!--
                This group contains an unbranched set of segments, and all of the segmentGroups marked with
                neuroLexId = sao864921383 form a non-overlapping set of all of the segments.
                These segmentGroups correspond to the 'cables' of NeuroML v1.8.1. -->

                <member segment="1"/>

                <member segment="6"/>

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            </segmentGroup>

            <segmentGroup id="Sec_Comp_3" neuroLexId="sao864921383">    <!--
                This group contains an unbranched set of segments, and all of the segmentGroups marked with
                neuroLexId = sao864921383 form a non-overlapping set of all of the segments.
                These segmentGroups correspond to the 'cables' of NeuroML v1.8.1. -->

                <member segment="2"/>

                <member segment="10"/>

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            </segmentGroup>

            <segmentGroup id="Sec_Comp_4" neuroLexId="sao864921383">    <!--
                This group contains an unbranched set of segments, and all of the segmentGroups marked with
                neuroLexId = sao864921383 form a non-overlapping set of all of the segments.
                These segmentGroups correspond to the 'cables' of NeuroML v1.8.1. -->

                <member segment="3"/>

                <member segment="9"/>
            </segmentGroup>

            <segmentGroup id="Sec_Comp_5" neuroLexId="sao864921383">    <!--
                This group contains an unbranched set of segments, and all of the segmentGroups marked with
                neuroLexId = sao864921383 form a non-overlapping set of all of the segments.
                These segmentGroups correspond to the 'cables' of NeuroML v1.8.1. -->

                <member segment="4"/>
            </segmentGroup>

            <segmentGroup id="Sec_Comp_6" neuroLexId="sao864921383">    <!--
                This group contains an unbranched set of segments, and all of the segmentGroups marked with
                neuroLexId = sao864921383 form a non-overlapping set of all of the segments.
                These segmentGroups correspond to the 'cables' of NeuroML v1.8.1. -->

                <member segment="5"/>

                <member segment="8"/>

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            </segmentGroup>

            <segmentGroup id="Sec_Comp_8" neuroLexId="sao864921383">    <!--
                This group contains an unbranched set of segments, and all of the segmentGroups marked with
                neuroLexId = sao864921383 form a non-overlapping set of all of the segments.
                These segmentGroups correspond to the 'cables' of NeuroML v1.8.1. -->

                <member segment="7"/>

                <member segment="15"/>

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            </segmentGroup>

            <segmentGroup id="Sec_Comp_12" neuroLexId="sao864921383">    <!--
                This group contains an unbranched set of segments, and all of the segmentGroups marked with
                neuroLexId = sao864921383 form a non-overlapping set of all of the segments.
                These segmentGroups correspond to the 'cables' of NeuroML v1.8.1. -->

                <member segment="11"/>

                <member segment="18"/>
            </segmentGroup>

            <segmentGroup id="Sec_Comp_17" neuroLexId="sao864921383">    <!--
                This group contains an unbranched set of segments, and all of the segmentGroups marked with
                neuroLexId = sao864921383 form a non-overlapping set of all of the segments.
                These segmentGroups correspond to the 'cables' of NeuroML v1.8.1. -->

                <member segment="16"/>

                <member segment="23"/>

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            </segmentGroup>

            <segmentGroup id="Sec_Comp_18" neuroLexId="sao864921383">    <!--
                This group contains an unbranched set of segments, and all of the segmentGroups marked with
                neuroLexId = sao864921383 form a non-overlapping set of all of the segments.
                These segmentGroups correspond to the 'cables' of NeuroML v1.8.1. -->

                <member segment="17"/>

                <member segment="24"/>

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            </segmentGroup>

            <segmentGroup id="Sec_Comp_26" neuroLexId="sao864921383">    <!--
                This group contains an unbranched set of segments, and all of the segmentGroups marked with
                neuroLexId = sao864921383 form a non-overlapping set of all of the segments.
                These segmentGroups correspond to the 'cables' of NeuroML v1.8.1. -->

                <member segment="25"/>

                <member segment="33"/>

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            </segmentGroup>

            <segmentGroup id="Sec_Comp_27" neuroLexId="sao864921383">    <!--
                This group contains an unbranched set of segments, and all of the segmentGroups marked with
                neuroLexId = sao864921383 form a non-overlapping set of all of the segments.
                These segmentGroups correspond to the 'cables' of NeuroML v1.8.1. -->

                <member segment="26"/>

                <member segment="34"/>

                <member segment="41"/>
            </segmentGroup>

            <segmentGroup id="Sec_Comp_60" neuroLexId="sao864921383">    <!--
                This group contains an unbranched set of segments, and all of the segmentGroups marked with
                neuroLexId = sao864921383 form a non-overlapping set of all of the segments.
                These segmentGroups correspond to the 'cables' of NeuroML v1.8.1. -->

                <member segment="59"/>

                <member segment="69"/>

                <member segment="75"/>

                <member segment="80"/>
            </segmentGroup>

            <segmentGroup id="Sec_Comp_61" neuroLexId="sao864921383">    <!--
                This group contains an unbranched set of segments, and all of the segmentGroups marked with
                neuroLexId = sao864921383 form a non-overlapping set of all of the segments.
                These segmentGroups correspond to the 'cables' of NeuroML v1.8.1. -->

                <member segment="60"/>

                <member segment="66"/>

                <member segment="74"/>

                <member segment="78"/>
            </segmentGroup>

            <segmentGroup id="Sec_Comp_82" neuroLexId="sao864921383">    <!--
                This group contains an unbranched set of segments, and all of the segmentGroups marked with
                neuroLexId = sao864921383 form a non-overlapping set of all of the segments.
                These segmentGroups correspond to the 'cables' of NeuroML v1.8.1. -->

                <member segment="81"/>
            </segmentGroup>

            <segmentGroup id="Sec_Comp_83" neuroLexId="sao864921383">    <!--
                This group contains an unbranched set of segments, and all of the segmentGroups marked with
                neuroLexId = sao864921383 form a non-overlapping set of all of the segments.
                These segmentGroups correspond to the 'cables' of NeuroML v1.8.1. -->

                <member segment="82"/>
            </segmentGroup>

            <segmentGroup id="Sec_Comp_91" neuroLexId="sao864921383">    <!--
                This group contains an unbranched set of segments, and all of the segmentGroups marked with
                neuroLexId = sao864921383 form a non-overlapping set of all of the segments.
                These segmentGroups correspond to the 'cables' of NeuroML v1.8.1. -->

                <member segment="90"/>
            </segmentGroup>

            <segmentGroup id="Sec_Comp_92" neuroLexId="sao864921383">    <!--
                This group contains an unbranched set of segments, and all of the segmentGroups marked with
                neuroLexId = sao864921383 form a non-overlapping set of all of the segments.
                These segmentGroups correspond to the 'cables' of NeuroML v1.8.1. -->

                <member segment="91"/>

                <member segment="93"/>
            </segmentGroup>

            <segmentGroup id="Sec_Comp_98" neuroLexId="sao864921383">    <!--
                This group contains an unbranched set of segments, and all of the segmentGroups marked with
                neuroLexId = sao864921383 form a non-overlapping set of all of the segments.
                These segmentGroups correspond to the 'cables' of NeuroML v1.8.1. -->

                <member segment="96"/>

                <member segment="98"/>

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            </segmentGroup>

            <segmentGroup id="Sec_Comp_109" neuroLexId="sao864921383">    <!--
                This group contains an unbranched set of segments, and all of the segmentGroups marked with
                neuroLexId = sao864921383 form a non-overlapping set of all of the segments.
                These segmentGroups correspond to the 'cables' of NeuroML v1.8.1. -->

                <member segment="107"/>
            </segmentGroup>

            <segmentGroup id="Sec_Comp_110" neuroLexId="sao864921383">    <!--
                This group contains an unbranched set of segments, and all of the segmentGroups marked with
                neuroLexId = sao864921383 form a non-overlapping set of all of the segments.
                These segmentGroups correspond to the 'cables' of NeuroML v1.8.1. -->

                <member segment="108"/>

                <member segment="110"/>
            </segmentGroup>

            <segmentGroup id="Sec_Comp_114" neuroLexId="sao864921383">    <!--
                This group contains an unbranched set of segments, and all of the segmentGroups marked with
                neuroLexId = sao864921383 form a non-overlapping set of all of the segments.
                These segmentGroups correspond to the 'cables' of NeuroML v1.8.1. -->

                <member segment="112"/>
            </segmentGroup>

            <segmentGroup id="Sec_Comp_115" neuroLexId="sao864921383">    <!--
                This group contains an unbranched set of segments, and all of the segmentGroups marked with
                neuroLexId = sao864921383 form a non-overlapping set of all of the segments.
                These segmentGroups correspond to the 'cables' of NeuroML v1.8.1. -->

                <member segment="113"/>

                <member segment="114"/>

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            </segmentGroup>

            <segmentGroup id="all">
                <include segmentGroup="Soma"/>
                <include segmentGroup="Sec_Comp_2"/>
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            </segmentGroup>

            <segmentGroup id="soma_group" neuroLexId="GO:0043025">    <!--Soma group-->

                <include segmentGroup="Soma"/>
            </segmentGroup>

            <segmentGroup id="Colour_White">
                <include segmentGroup="Soma"/>
            </segmentGroup>

            <segmentGroup id="Colour_DarkGrey">
                <include segmentGroup="Sec_Comp_2"/>
                <include segmentGroup="Sec_Comp_3"/>
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            </segmentGroup>

            <segmentGroup id="axon_group" neuroLexId="GO:0030424">    <!--Axon group-->

                <include segmentGroup="Sec_Comp_2"/>
                <include segmentGroup="Sec_Comp_3"/>
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            </segmentGroup>

        </morphology>

            <!--Adding the biophysical parameters-->

        <biophysicalProperties id="biophys">

            <membraneProperties>
                <!-- soma -->
                <channelDensity condDensity="30 mS_per_cm2" id="na_s_soma" segmentGroup="soma_group" ionChannel="na_s" ion="na" erev="55 mV"/>
                <channelDensity condDensity="30 mS_per_cm2" id="kdr_soma" segmentGroup="soma_group"
                ionChannel="kdr" ion="k" erev="-75 mV"/>
                <channelDensity condDensity="15 mS_per_cm2" id="k_soma" segmentGroup="soma_group"
                ionChannel="k" ion="k" erev="-75 mV"/>
                <channelDensity condDensity="20 mS_per_cm2" id="cal_soma" segmentGroup="soma_group"
                ionChannel="cal" ion="cal" erev="120 mV"/>

                <!-- dendrite 10 35 25-->
                <channelDensity condDensity="10 mS_per_cm2" id="cah_dend" segmentGroup="dendrite_group" ionChannel="cah" ion="ca" erev="120 mV"/>
                <channelDensity condDensity="35 mS_per_cm2" id="kca_dend" segmentGroup="dendrite_group" ionChannel="kca" ion="k" erev="-75 mV"/>
                <channelDensity condDensity="25 mS_per_cm2" id="h_dend" segmentGroup="dendrite_group" ionChannel="h" ion="k" erev="-43 mV"/>

                <!-- axon -->
                <channelDensity condDensity="200 mS_per_cm2" id="na_axon" segmentGroup="axon_group" ionChannel="na_a" ion="na" erev="55 mV"/>
                <channelDensity condDensity="200 mS_per_cm2" id="k_axon" segmentGroup="axon_group" ionChannel="k" ion="k" erev="-75 mV"/>

                <channelDensity condDensity="1.3e-2 mS_per_cm2" id="leak_all" segmentGroup="all" ionChannel="leak" ion="_leak" erev="10 mV"/>

                <spikeThresh value="0 mV"/>
                <specificCapacitance value="1 uF_per_cm2"/>
                <initMembPotential value="-65.0 mV"/>

            </membraneProperties>

            <intracellularProperties>
                <species segmentGroup="dendrite_group" id="ca" ion="ca" concentrationModel="ca_conc" initialConcentration="3.7152 mM" initialExtConcentration="3.0mM"/>

                <resistivity value=".1 ohm_cm" segmentGroup="soma_group"/>
                <resistivity value=".1 ohm_cm" segmentGroup="dendrite_group"/>
                <resistivity value=".1 ohm_cm" segmentGroup="axon_group"/>
            </intracellularProperties>

        </biophysicalProperties>

    </cell>

</neuroml>
