<?xml version="1.0" encoding="UTF-8"?>
<neuroml xmlns="http://www.neuroml.org/schema/neuroml2" xmlns:xsi="http://www.w3.org/2001/XMLSchema-instance" xsi:schemaLocation="http://www.neuroml.org/schema/neuroml2  https://raw.github.com/NeuroML/NeuroML2/development/Schemas/NeuroML2/NeuroML_v2beta3.xsd" id="net">
  <include href="olive_test_C16.cell.nml"/>
  <include href="olive_test_C11.cell.nml"/>
  <include href="AMPA.synapse.nml"/>

  <!--<pulseGenerator id="iclamp0" delay="600 ms" duration="200 ms" amplitude="-1 uA"/>-->
  <pulseGenerator id="iclamp0" delay="500 ms" duration="200 ms" amplitude="-1 nA"/>

  <network id="net" type="networkWithTemperature" temperature="35 degC">

    <population id="pop" component="C16" type="populationList" size="1">
      <instance id="0">
        <location x="0" y="0" z="0"/>
      </instance>

    </population>

    <population id="pop1" component="C11A" type="populationList" size="1">
      <instance id="0">
        <location x="100" y="100" z="100"/>
      </instance>

    </population>

    <projection id="ampa" presynapticPopulation="pop" postsynapticPopulation="pop1" synapse="AMPA">
        <connection id="0" preCellId="../pop/0/C16" postCellId="../pop1/0/C11A"/>
    </projection>

    <inputList id="Clamps" component="iclamp0" population="pop">
        <input id="0" target="../pop/0/C16" segmentId="0" destination="synapses"/> <!-- iclamp into iseg -->
        <input id="1" target="../pop1/0/C11A" segmentId="0" destination="synapses"/> <!-- iclamp into iseg -->
    </inputList>

  </network>

</neuroml>
