<?xml version="1.0" encoding="UTF-8"?>
<neuroml xmlns="http://www.neuroml.org/schema/neuroml2" xmlns:xsi="http://www.w3.org/2001/XMLSchema-instance" xsi:schemaLocation="http://www.neuroml.org/schema/neuroml2  https://raw.githubusercontent.com/NeuroML/NeuroML2/development/Schemas/NeuroML2/NeuroML_v2beta4.xsd" id="cell">
    <!-- soma -->
    <include href="na_s.channel.nml"/>
    <include href="kdr.channel.nml"/>
    <include href="k.channel.nml"/>
    <include href="cal.channel.nml"/>

    <!-- dend -->
    <include href="cah.channel.nml"/>
    <include href="kca.channel.nml"/>
    <include href="h.channel.nml"/>
    <include href="ca.nml"/>

    <!-- axon -->
    <include href="na_a.channel.nml"/>

    <!-- all  -->
    <include href="leak.channel.nml"/>

<!--
% Cell morphology
% p1     = 0.25;        % Cell surface ratio soma/dendrite
% p2     = 0.15;        % Cell surface ratio axon(hillock)/soma
% g_int  = 0.13;        % Cell internal conductance

Adend = ldend*pi*Rdendˆ2
Asoma = lsoma*pi*Rsomaˆ2

.25 = ldend*RDendˆ2 / lsoma*pi*Rsomaˆ2

assume Rdend = 10;
assume Rsoma = 20;
assume lsoma = 20;
assume ldend = 200
4*1*ldend = lsoma*Rsomaˆ2
4*1*ldend = 10*400

assume lsoma = 20;
ldend = 2250;

Raxon = 20;
.15 = laxon*20ˆ2 / 20*20ˆ2

20 * .15 = laxon = 3;
-->

    <cell id="cell_11A">

        <morphology id="morphology_C11A_scaled_exp">

            <segment id="0" name="Comp_1">
                <proximal x="131.11824" y="79.55813" z="47.315475" diameter="4.18"/>
                <distal x="131.0086" y="79.18364" z="47.25" diameter="5.5575"/>
            </segment>

            <segment id="1" name="Comp_3">
                <parent segment="0"/>
                <distal x="131.03902" y="78.46183" z="47.326275" diameter="6.67356"/>
            </segment>

            <segment id="2" name="Comp_4">
                <parent segment="1"/>
                <distal x="131.02135" y="77.69423" z="47.5173" diameter="8.075"/>
            </segment>

            <segment id="3" name="Comp_5">
                <parent segment="2"/>
                <distal x="130.88321" y="76.91941" z="47.900925" diameter="9.57144"/>
            </segment>

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
            <segmentGroup id="Soma" neuroLexId="sao864921383">    <!--
                This group contains an unbranched set of segments, and all of the segmentGroups marked with
                neuroLexId = sao864921383 form a non-overlapping set of all of the segments.
                These segmentGroups correspond to the 'cables' of NeuroML v1.8.1. -->

                <member segment="0"/>

                <member segment="1"/>

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            </segmentGroup>

            <segmentGroup id="ExtraSomaSec_Comp_669" neuroLexId="sao864921383">    <!--
                This group contains an unbranched set of segments, and all of the segmentGroups marked with
                neuroLexId = sao864921383 form a non-overlapping set of all of the segments.
                These segmentGroups correspond to the 'cables' of NeuroML v1.8.1. -->

                <member segment="57"/>

                <member segment="58"/>

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            </segmentGroup>

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
            <segmentGroup id="all">
                <include segmentGroup="Soma"/>
                <include segmentGroup="ExtraSomaSec_Comp_669"/>
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            </segmentGroup>

            <segmentGroup id="Colour_White">
                <include segmentGroup="Soma"/>
                <include segmentGroup="ExtraSomaSec_Comp_669"/>
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            </segmentGroup>

            <segmentGroup id="soma_group" neuroLexId="GO:0043025">    <!--Soma group-->

                <include segmentGroup="Soma"/>
            </segmentGroup>

            <segmentGroup id="dendrite_group" neuroLexId="GO:0030425">    <!--Dendrite group-->

                <include segmentGroup="ExtraSomaSec_Comp_669"/>
                <include segmentGroup="ExtraSomaSec_Comp_854"/>
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            </segmentGroup>

            <segmentGroup id="ExtraSomaSegments">
                <include segmentGroup="ExtraSomaSec_Comp_669"/>
                <include segmentGroup="ExtraSomaSec_Comp_854"/>
                <include segmentGroup="ExtraSomaSec_Comp_1244"/>
                <include segmentGroup="ExtraSomaSec_Comp_2049"/>
            </segmentGroup>

            <segmentGroup id="Colour_Green">
                <include segmentGroup="Sec_Comp_59"/>
                <include segmentGroup="Sec_Comp_66"/>
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            </segmentGroup>

        </morphology>

        <biophysicalProperties id="biophys">

            <membraneProperties>
                <!-- soma -->
                <channelDensity condDensity="30 mS_per_cm2" id="na_s_soma" segmentGroup="soma_group" ionChannel="na_s" ion="na" erev="55 mV"/>
                <channelDensity condDensity="30 mS_per_cm2" id="kdr_soma" segmentGroup="soma_group"
                ionChannel="kdr" ion="k" erev="-75 mV"/>
                <channelDensity condDensity="15 mS_per_cm2" id="k_soma" segmentGroup="soma_group"
                ionChannel="k" ion="k" erev="-75 mV"/>
                <channelDensity condDensity="20 mS_per_cm2" id="cal_soma" segmentGroup="soma_group"
                ionChannel="cal" ion="cal" erev="120 mV"/>

                <!-- dendrite 10 35 25-->
                <channelDensity condDensity="10 mS_per_cm2" id="cah_dend" segmentGroup="dendrite_group" ionChannel="cah" ion="ca" erev="120 mV"/>
                <channelDensity condDensity="35 mS_per_cm2" id="kca_dend" segmentGroup="dendrite_group" ionChannel="kca" ion="k" erev="-75 mV"/>
                <channelDensity condDensity="25 mS_per_cm2" id="h_dend" segmentGroup="dendrite_group" ionChannel="h" ion="k" erev="-43 mV"/>

                <!-- axon -->
                <channelDensity condDensity="200 mS_per_cm2" id="na_axon" segmentGroup="axon_group" ionChannel="na_a" ion="na" erev="55 mV"/>
                <channelDensity condDensity="200 mS_per_cm2" id="k_axon" segmentGroup="axon_group" ionChannel="k" ion="k" erev="-75 mV"/>

                <channelDensity condDensity="1.3e-2 mS_per_cm2" id="leak_all" segmentGroup="all" ionChannel="leak" ion="_leak" erev="10 mV"/>

                <spikeThresh value="0 mV"/>
                <specificCapacitance value="1 uF_per_cm2"/>
                <initMembPotential value="-65.0 mV"/>

            </membraneProperties>

            <intracellularProperties>
                <species segmentGroup="dendrite_group" id="ca" ion="ca" concentrationModel="ca_conc" initialConcentration="3.7152 mM" initialExtConcentration="3.0mM"/>

                <resistivity value=".1 ohm_cm" segmentGroup="soma_group"/>
                <resistivity value=".1 ohm_cm" segmentGroup="dendrite_group"/>
                <resistivity value=".1 ohm_cm" segmentGroup="axon_group"/>
            </intracellularProperties>

        </biophysicalProperties>

     </cell>

     <cell id="cell_25C">

        <notes>Olives!</notes>

        <morphology id="morphology_C25C_scaled_exp">

            <segment id="0" name="Comp_1">
                <proximal x="134.86" y="95.04" z="44.325" diameter="10.56"/>
                <distal x="134.78828" y="95.22172" z="44.825176" diameter="11.0"/>
            </segment>

            <segment id="1" name="Comp_3">
                <parent segment="0"/>
                <distal x="134.31902" y="94.23546" z="44.950726" diameter="11.275"/>
            </segment>

            <segment id="2" name="Comp_4">
                <parent segment="1"/>
                <distal x="134.77551" y="93.79216" z="44.875576" diameter="10.97272"/>
            </segment>

            <segment id="3" name="Comp_5">
                <parent segment="2"/>
                <distal x="135.23466" y="93.35722" z="44.8479" diameter="10.395"/>
            </segment>

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
            <segmentGroup id="Soma" neuroLexId="sao864921383">    <!--
                This group contains an unbranched set of segments, and all of the segmentGroups marked with
                neuroLexId = sao864921383 form a non-overlapping set of all of the segments.
                These segmentGroups correspond to the 'cables' of NeuroML v1.8.1. -->

                <member segment="0"/>

                <member segment="1"/>

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            </segmentGroup>

            <segmentGroup id="ExtraSomaSec_Comp_256" neuroLexId="sao864921383">    <!--
                This group contains an unbranched set of segments, and all of the segmentGroups marked with
                neuroLexId = sao864921383 form a non-overlapping set of all of the segments.
                These segmentGroups correspond to the 'cables' of NeuroML v1.8.1. -->

                <member segment="19"/>

                <member segment="20"/>

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            </segmentGroup>

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
            <segmentGroup id="all">
                <include segmentGroup="Soma"/>
                <include segmentGroup="ExtraSomaSec_Comp_256"/>
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            </segmentGroup>

            <segmentGroup id="Colour_White">
                <include segmentGroup="Soma"/>
                <include segmentGroup="ExtraSomaSec_Comp_256"/>
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            </segmentGroup>

            <segmentGroup id="soma_group" neuroLexId="GO:0043025">    <!--Soma group-->

                <include segmentGroup="Soma"/>
            </segmentGroup>

            <segmentGroup id="dendrite_group" neuroLexId="GO:0030425">    <!--Dendrite group-->

                <include segmentGroup="ExtraSomaSec_Comp_256"/>
                <include segmentGroup="ExtraSomaSec_Comp_663"/>
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            </segmentGroup>

            <segmentGroup id="ExtraSomaSegments">
                <include segmentGroup="ExtraSomaSec_Comp_256"/>
                <include segmentGroup="ExtraSomaSec_Comp_663"/>
                <include segmentGroup="ExtraSomaSec_Comp_882"/>
                <include segmentGroup="ExtraSomaSec_Comp_1307"/>
            </segmentGroup>

            <segmentGroup id="Colour_Green">
                <include segmentGroup="Sec_Comp_21"/>
                <include segmentGroup="Sec_Comp_125"/>
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            </segmentGroup>

        </morphology>
        <!-- Adding the biophysical parameters -->

        <biophysicalProperties id="biophys">

            <membraneProperties>
                <!-- soma -->
                <channelDensity condDensity="30 mS_per_cm2" id="na_s_soma" segmentGroup="soma_group" ionChannel="na_s" ion="na" erev="55 mV"/>
                <channelDensity condDensity="30 mS_per_cm2" id="kdr_soma" segmentGroup="soma_group"
                ionChannel="kdr" ion="k" erev="-75 mV"/>
                <channelDensity condDensity="15 mS_per_cm2" id="k_soma" segmentGroup="soma_group"
                ionChannel="k" ion="k" erev="-75 mV"/>
                <channelDensity condDensity="20 mS_per_cm2" id="cal_soma" segmentGroup="soma_group"
                ionChannel="cal" ion="cal" erev="120 mV"/>

                <!-- dendrite 10 35 25-->
                <channelDensity condDensity="10 mS_per_cm2" id="cah_dend" segmentGroup="dendrite_group" ionChannel="cah" ion="ca" erev="120 mV"/>
                <channelDensity condDensity="35 mS_per_cm2" id="kca_dend" segmentGroup="dendrite_group" ionChannel="kca" ion="k" erev="-75 mV"/>
                <channelDensity condDensity="25 mS_per_cm2" id="h_dend" segmentGroup="dendrite_group" ionChannel="h" ion="k" erev="-43 mV"/>

                <!-- axon -->
                <channelDensity condDensity="200 mS_per_cm2" id="na_axon" segmentGroup="axon_group" ionChannel="na_a" ion="na" erev="55 mV"/>
                <channelDensity condDensity="200 mS_per_cm2" id="k_axon" segmentGroup="axon_group" ionChannel="k" ion="k" erev="-75 mV"/>

                <channelDensity condDensity="1.3e-2 mS_per_cm2" id="leak_all" segmentGroup="all" ionChannel="leak" ion="_leak" erev="10 mV"/>

                <spikeThresh value="0 mV"/>
                <specificCapacitance value="1 uF_per_cm2"/>
                <initMembPotential value="-65.0 mV"/>

            </membraneProperties>

            <intracellularProperties>
                <species segmentGroup="dendrite_group" id="ca" ion="ca" concentrationModel="ca_conc" initialConcentration="3.7152 mM" initialExtConcentration="3.0mM"/>

                <resistivity value=".1 ohm_cm" segmentGroup="soma_group"/>
                <resistivity value=".1 ohm_cm" segmentGroup="dendrite_group"/>
                <resistivity value=".1 ohm_cm" segmentGroup="axon_group"/>
            </intracellularProperties>

        </biophysicalProperties>

    </cell>

</neuroml>
